# OpenSim document version 40000
ExternalLoads:
  datafile: C:\Users\u0130218\Documents\KU_Leuven\conferences\ESMAC_2023\osimws\data\research_data-main\ESMAC_2023\input\ID\grf.mot
  ExternalForce grf_r_2: applied_to_body=calcn_r force_expressed_in_body=ground point_expressed_in_body=ground
      force_identifier=ground_force_2_v point_identifier=ground_force_2_p torque_identifier=ground_moment_2_m
      data_source_name=grf
  ExternalForce grf_l_1: applied_to_body=calcn_l force_expressed_in_body=ground point_expressed_in_body=ground
      force_identifier=ground_force_1_v point_identifier=ground_force_1_p torque_identifier=ground_moment_1_m
      data_source_name=grf
  ExternalForce grf_l_3: applied_to_body=calcn_l force_expressed_in_body=ground point_expressed_in_body=ground
      force_identifier=ground_force_3_v point_identifier=ground_force_3_p torque_identifier=ground_moment_3_m
      data_source_name=grf
