# OpenSim document version 40000
InverseKinematicsTool:
  time_range: 2.306667 3.213333
  output_motion_file: C:\Users\u0130218\Documents\KU_Leuven\conferences\ESMAC_2023\osimws\data\research_data-main\ESMAC_2023\output\IK\ik.mot
  marker_file: marker_experimental.trc
  IKTaskSet:
    IKMarkerTask RASI: apply=true weight=10
    IKMarkerTask LASI: apply=true weight=10
    IKMarkerTask SACR: apply=true weight=10
    IKMarkerTask RT1: apply=true weight=5
    IKMarkerTask RT2: apply=true weight=5
    IKMarkerTask RT3: apply=true weight=5
    IKMarkerTask RKNM: apply=false weight=1
    IKMarkerTask RS1: apply=true weight=5
    IKMarkerTask RS2: apply=true weight=5
    IKMarkerTask RS3: apply=true weight=5
    IKMarkerTask RANK: apply=true weight=1
    IKMarkerTask RANM: apply=false weight=1
    IKMarkerTask RHEE: apply=true weight=1
    IKMarkerTask RTOE: apply=true weight=1
    IKMarkerTask RKJC: apply=false weight=1
    IKMarkerTask RAJC: apply=false weight=1
    IKMarkerTask RKNE: apply=true weight=1
    IKMarkerTask LTOE: apply=true weight=1
    IKMarkerTask LAJC: apply=false weight=1
    IKMarkerTask LHEE: apply=true weight=1
    IKMarkerTask LANK: apply=true weight=5
    IKMarkerTask LANM: apply=false weight=1
    IKMarkerTask LS2: apply=true weight=5
    IKMarkerTask LS3: apply=true weight=5
    IKMarkerTask LS1: apply=true weight=5
    IKMarkerTask LKNM: apply=false weight=1
    IKMarkerTask LKJC: apply=false weight=1
    IKMarkerTask LKNE: apply=true weight=1
    IKMarkerTask LT1: apply=true weight=5
    IKMarkerTask LT2: apply=true weight=5
    IKMarkerTask LT3: apply=true weight=5
    IKMarkerTask CLAV: apply=true weight=1
    IKMarkerTask STRN: apply=true weight=1
    IKMarkerTask T10: apply=true weight=1
    IKMarkerTask RBAK: apply=false weight=1
    IKMarkerTask C7: apply=true weight=1
