# OpenSim document version 40000
AnalyzeTool:
  model_file: ..\Rajagopal2015_os4_UniVie_scaled.osim
  replace_force_set: false
  results_directory: .
  output_precision: 8
  initial_time: 2.306667
  final_time: 3.213333
  solve_for_equilibrium_for_auxiliary_states: false
  maximum_number_of_integrator_steps: 20000
  maximum_integrator_step_size: 1
  minimum_integrator_step_size: 1e-8
  integrator_error_tolerance: 1e-5
  external_loads_file: GRF.xml
  coordinates_file: ik.mot
  lowpass_cutoff_frequency_for_coordinates: 6
  AnalysisSet Analyses:
    JointReaction joint reaction analysis: start_time=2.306667 end_time=3.213333 step_interval=1 in_degrees=true
        forces_file=.\_StaticOptimization_force.sto joint_names=all apply_on_bodies=parent express_in_frame=parent
