# OpenSim document version 40000
AnalyzeTool:
  model_file: C:\Git\research_data\ESMAC_2023\simulations\P03\pre\Rajagopal2015_os4_UniVie_scaled.osim
  replace_force_set: false
  force_set_files: C:\Git\research_data\ESMAC_2023\setupFiles\actuators_so_Bas2.xml
  results_directory: C:\Git\research_data\ESMAC_2023\simulations\P03\pre\8_Dynamic03_bg_model_bg2_actuators_setup_l
  output_precision: 8
  initial_time: 2.306667
  final_time: 3.213333
  solve_for_equilibrium_for_auxiliary_states: false
  maximum_number_of_integrator_steps: 20000
  maximum_integrator_step_size: 1
  minimum_integrator_step_size: 1e-8
  integrator_error_tolerance: 1e-5
  external_loads_file: .\GRF.xml
  coordinates_file: C:\Git\research_data\ESMAC_2023\simulations\P03\pre\8_Dynamic03_bg_model_bg2_actuators_setup_l\ik.mot
  lowpass_cutoff_frequency_for_coordinates: 6
  AnalysisSet Analyses:
    StaticOptimization: start_time=2.306667 end_time=3.213333 step_interval=1 in_degrees=true use_model_force_set=true
        activation_exponent=2 use_muscle_physiology=true optimizer_convergence_criterion=0.0001
        optimizer_max_iterations=25
