# OpenSim document version 40000
AnalyzeTool:
  model_file: ..\P03_scaled.osim
  replace_force_set: false
  force_set_files: SO_actuators.xml
  output_precision: 8
  initial_time: 2.306667
  final_time: 3.213333
  solve_for_equilibrium_for_auxiliary_states: false
  maximum_number_of_integrator_steps: 20000
  maximum_integrator_step_size: 1
  minimum_integrator_step_size: 1e-8
  integrator_error_tolerance: 1e-5
  external_loads_file: .\GRF_BAK.xml
  coordinates_file: .\ik.mot
  lowpass_cutoff_frequency_for_coordinates: 6
  AnalysisSet Analyses:
    JointReaction joint reaction analysis: start_time=2.306667 end_time=3.213333 step_interval=1 in_degrees=true
        joint_names=all apply_on_bodies=parent express_in_frame=parent
  ControllerSet Controllers:
    ControlSetController: controls_file=.\_StaticOptimization_controls.xml
